*Heading
** Job name: DCB_CS_el2p54 Model name: Model-1
** Generated by: Abaqus/CAE 2021
*Preprint, echo=NO, model=NO, history=NO, contact=NO
**
** PARTS
**
*Part, name=_VCCT_DCB
*Node
      1,   30.3999996,           0.,   2.25099993
      2,   30.3999996,   25.3999996,   2.25099993
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*Element, type=C3D8I
  1,   33,    1,  108,  489,  117,    8,  156,  750
  2,   34,   33,  489,  490,  116,  117,  750,  751
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**
*USER ELEMENT, TYPE=U308, NODES=8,COORDINATES=3,PROPERTIES=20,VARIABLES=22
1,2,3
*Element,type=U308,elset=PRXVCCT_I
321,  233,   20,  272, 1029,   33,    1,  108,  489
322,  232,  233, 1029, 1030,   34,   33,  489,  490
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*Nset, nset=all, generate
    1,  1892,     1
*Elset, elset=all, generate
    1,  1260,     1
*Nset, nset=cze_1213
    1,    2,    3,    4,    9,   10
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*Elset, elset=cze_1213, generate
 321,  740,    1
*Nset, nset=sublam_plies_1_12
   17,   18,   19,   20,   21,   22
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*Elset, elset=sublam_plies_1_12
  741,  742,  743,  744,  745,  746
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*Nset, nset=sublam_plies_13_24
    1,    2,    3,    4,    5,    6
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*Elset, elset=sublam_plies_13_24
   1,   2,   3,   4,   5,   6
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*Elset, elset=VCCT_failed_a0
 621, 622, 623, 624, 625, 626
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*Elset, elset=VCCT_pristine
 321, 322, 323, 324, 325, 326
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*Orientation, name=Ori-1
1., 0., 0., 0., 1., 0.
3, 0.
** Section: SC_13_24
*Solid Section, elset=sublam_plies_13_24, composite, orientation=Ori-1
1., 5, IM7-8552, 0., pname
** Section: Comp_solid
*Solid Section, elset=sublam_plies_1_12, composite, orientation=Ori-1
1., 5, IM7-8552, 0., pname
**
*parameter
Y_N_I = 1000.0
s_n_I = 8.0
Y_S_I = 1000.0
s_s_I = 8.0
GIC_IB = 0.212
GIIC_IB = 0.774
eta_IB = 2.1
GIR_IB = 0.0
GIIR_IB = 0.0
etaR_IB = 0.0
GIC_IT = 0.212
GIIC_IT = 0.774
eta_IT = 2.1
GIR_IT =0.0
GIIR_IT = 0.0
etaR_IT = 0.0
dadn_IT = 1
dadn_IB = 1
dadn_IT_F = 1
dadn_IB_F = 1
r_curve_IT = 1
r_curve_IB = 1
r_curve_IT_F = 1
r_curve_IB_F = 1
r_curve_1 = 1
dstat_pristine = 0.0
dstat_failed = 1.0
ORI_IT = 0.0
ORI_IB = 0.0
fg_x = 1.0
fg_y = 0.0
fg_z = 0.0
**
*UEL PROPERTY, ELSET=VCCT_pristine
<dstat_pristine>,<ORI_IT>,<ORI_IB>,<fg_x>,<fg_y>,<fg_z>,<Y_N_I>,<s_n_I>,
<Y_S_I>,<s_s_I>,<GIC_IB>,<GIIC_IB>,<eta_IB>,<GIC_IT>,<GIIC_IT>,<eta_IT>,
<dadn_IB>,<r_curve_IB>,<dadn_IT>,<r_curve_IT>
**
*UEL PROPERTY, ELSET=VCCT_failed_a0
<dstat_failed>,<ORI_IT>,<ORI_IB>,<fg_x>,<fg_y>,<fg_z>,<Y_N_I>,<s_n_I>,
<Y_S_I>,<s_n_I>,<GIC_IB>,<GIIC_IB>,<eta_IB>,<GIC_IT>,<GIIC_IT>,<eta_IT>,
<dadn_IB>,<r_curve_IB>,<dadn_IT>,<r_curve_IT>
**
**VCCT_DADN, DADN = 1
**2.44E6, 10.61,  2.0, 0.0, 0.0, 0.0
**2.44E6, 10.61,  2.0, 0.0, 0.0, 1.0
**
**VCCT_R_CURVE, R_CURVE = 1
**1.0, 0.0, 0.0
**1.0, 0.0, 0.2
**1.0, 0.0, 0.5
**1.0, 0.0, 0.8
**1.0, 0.0, 1.0
**1.588, 15.24, 0.0
**1.565, 15.24, 0.2
**1.14, 3.0226, 0.5
**1.23, 5.994,0.8
**1.15,5.994,1.0
**
*End Part
**
**
** ASSEMBLY
**
*Assembly, name=Assembly
**
*Instance, name=DCB-1, part=_VCCT_DCB
*End Instance
**
*Nset, nset=PIN_bot, instance=DCB-1
  25,  28, 357, 358, 359, 360, 361, 362, 363, 364, 365
*Elset, elset=PIN_bot, instance=DCB-1
 741, 742, 743, 744, 745, 746
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*Nset, nset=PIN_top, instance=DCB-1
  13,  14, 206, 207, 208, 209, 210, 211, 212, 213, 214
*Elset, elset=PIN_top, instance=DCB-1
 302, 304, 306, 308, 310, 312
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*Nset, nset=y0, instance=DCB-1
 14, 25, 32
*End Assembly
**
** MATERIALS
**
*Material, name=IM7-8552
*Elastic, type=ENGINEERING CONSTANTS
161000.,11380.,11380.,  0.32,  0.32,  0.45, 5200., 5200.
 3900.,
**
** BOUNDARY CONDITIONS
**
** Name: BC_y0 Type: Displacement/Rotation
*Boundary
y0, 2, 2
** ----------------------------------------------------------------
**
** STEP: Step-1
**
*Step, name=Step-1, nlgeom=NO, inc=1000
*Static
0.01, 1., 1e-15, 0.01
**
** BOUNDARY CONDITIONS
**
** Name: BC_PIN_bot Type: Displacement/Rotation
*Boundary
PIN_bot, 3, 3, -1.2
** Name: BC_PIN_top Type: Displacement/Rotation
*Boundary
PIN_top, 3, 3, 1.2
**
** OUTPUT REQUESTS
**
*Output, field, variable=PRESELECT
*Node Output
U
*Element Output, directions=YES
S
**
** HISTORY OUTPUT: H-Output-1
**
*Output, history
*Node Output, nset=PIN_top
U1, U2, U3,RF1, RF2, RF3
**
*End Step
